// SBML level 2 version 4

model BERNDT2017MSB()

  // Compartments:
  compartment ext = 1;
  compartment cyto = 1;
  compartment er = 1;
  compartment mito = 1;
  compartment ld = 1;
  compartment vldl = 1;
  compartment mm = 1;
  compartment imm = 1;

  // Species:
  species c16_ext in ext = 5.69073e-1;
  species glc_ext in ext = 7;
  species acoa_cyt in cyto = 4.030818e-2;
  species adp_cyt in cyto = 1.919318;
  species atp_cyt in cyto = 5.398144;
  species c10_coa_cyt in cyto = 1.790113e-3;
  species c12_coa_cyt in cyto = 1.790113e-3;
  species c14_coa_cyt in cyto = 1.790113e-3;
  species c16_coa_cyt in cyto = 1.933127e-2;
  species c4_coa_cyt in cyto = 4.296272e-4;
  species c6_coa_cyt in cyto = 2.434554e-3;
  species c8_coa_cyt in cyto = 4.475284e-3;
  species cit_cyt in cyto = 4.903643e-1;
  species coa_cyt in cyto = 9.011663e-2;
  species hco3_cyt in cyto = 2.5e1;
  species malcoa_cyt in cyto = 9.553377e-4;
  species nadp_cyt in cyto = 1.571673e-1;
  species nadph_cyt in cyto = 8.428322e-1;
  species oaa_cyt in cyto = 1.445567e-3;
  species p_cyt in cyto = 9.414906;

  // Parameters:
  ins has mM;
  glucagon has mM;
  gamma has dimensionless;
  gamma_ACC1 has dimensionless;
  v_FAS_c16 has mM_per_h;
  v_FAS_c14 has mM_per_h;
  v_FAS_c12 has mM_per_h;
  v_FAS_c10 has mM_per_h;
  v_FAS_c8 has mM_per_h;
  v_FAS_c6 has mM_per_h;
  v_FAS_c4 has mM_per_h;
  vmax_ACC1_native has mM_per_h;
  v_ACC1_native has mM_per_h;
  vmax_ACC1_phospho has mM_per_h;
  v_ACC1_phospho has mM_per_h;
  v_ACC1 has mM_per_h;
  km_CIT_LYS_atp_cyt has mM;
  v_CIT_LYS has mM_per_h;
  vmax_CIT_LYS = 9e1 per_h_per_mMmM;
  v0_ACC1 = 3.51e1 mM_per_h;
  vmax_FAS_c4 = 1.08e2 mM_per_h;
  vmax_FAS_c6 = 2.16e3 mM_per_h;
  vmax_FAS_c8 = 2.16e3 mM_per_h;
  vmax_FAS_c10 = 2.16e3 mM_per_h;
  vmax_FAS_c12 = 2.16e3 mM_per_h;
  vmax_FAS_c14 = 2.16e3 mM_per_h;
  vmax_FAS_c16 = 2.16e3 mM_per_h;
  ONE = 1 dimensionless;
  num_05 = 0.5 dimensionless;
  num_25 = 2.5 dimensionless;
  ins0 = 1.55e-6 mM;
  n_ins = 5.7 dimensionless;
  km_glc_ext_ins = 7.7 mM;
  glucagon0 = 2.53e-7 mM;
  n_glucagon = 5.65 dimensionless;
  km_glc_ext_glucagon = 4.7 mM;
  glucagonb = 2e-8 mM;
  portal2central_hormone_ratio = 2 dimensionless;
  n_ins_gamma = 1.75 dimensionless;
  km_ins_gamma = 7e-7 mM;
  n_glucagon_gamma = 3 dimensionless;
  km_glucagon_gamma = 6e-8 mM;
  km_c16_gamma = 0.4 mM;
  keq_CIT_LYS = 8.92e-3 dimensionless;
  km_CIT_LYS_cit_cyt = 0.17 mM;
  km_CIT_LYS_coa_cyt = 0.0065 mM;
  k0_CIT_LYS_atp_cyt = 0.172 mM;
  ki_CIT_LYS_adp_cyt = 0.171 mM;
  km_ACC1_phospho_atp_cyt = 0.36 mM;
  km_ACC1_phospho_acoa_cyt = 0.025 mM;
  km_ACC1_phospho_hco3_cyt = 2.5 mM;
  ka_ACC1_phospho_cit_cyt = 2.1 mM;
  ki_ACC1_phospho_malcoa_cyt = 0.009 mM;
  km_ACC1_phospho_c16_coa_cyt = 0.009 mM;
  f_ACC1_native_cit_cyt = 1.4 dimensionless;
  km_ACC1_native_atp_cyt = 0.36 mM;
  km_ACC1_native_acoa_cyt = 0.025 mM;
  km_ACC1_native_hco3_cyt = 2.5 mM;
  ki_ACC1_native_malcoa_cyt = 0.009 mM;
  ka_ACC1_native_cit_cyt = 0.8 mM;
  km_FAS_c4_acoa_cyt = 0.018 mM;
  km_FAS_c4_malcoa_cyt = 0.026 mM;
  km_FAS_c4_nadph_cyt = 0.012 mM;
  n_FAS_c4_nadph_cyt = 2 dimensionless;
  km_FAS_c6_c4_coa_cyt = 0.012 mM;
  km_FAS_c6_malcoa_cyt = 0.026 mM;
  km_FAS_c6_nadph_cyt = 0.012 mM;
  n_FAS_c6_nadph_cyt = 2 dimensionless;
  km_FAS_c8_c6_coa_cyt = 0.068 mM;
  km_FAS_c8_malcoa_cyt = 0.026 mM;
  km_FAS_c8_nadph_cyt = 0.012 mM;
  n_FAS_c8_nadph_cyt = 2 dimensionless;
  km_FAS_c10_c8_coa_cyt = 0.125 mM;
  km_FAS_c10_malcoa_cyt = 0.026 mM;
  km_FAS_c10_nadph_cyt = 0.012 mM;
  n_FAS_c10_nadph_cyt = 2 dimensionless;
  km_FAS_c12_c10_coa_cyt = 0.05 mM;
  km_FAS_c12_malcoa_cyt = 0.026 mM;
  km_FAS_c12_nadph_cyt = 0.012 mM;
  n_FAS_c12_nadph_cyt = 2 dimensionless;
  km_FAS_c14_c12_coa_cyt = 0.05 mM;
  km_FAS_c14_malcoa_cyt = 0.026 mM;
  km_FAS_c14_nadph_cyt = 0.012 mM;
  n_FAS_c14_nadph_cyt = 2 dimensionless;
  km_FAS_c16_c14_coa_cyt = 0.05 mM;
  km_FAS_c16_malcoa_cyt = 0.026 mM;
  km_FAS_c16_nadph_cyt = 0.012 mM;
  n_FAS_c16_nadph_cyt = 2 dimensionless;

  // Assignment rules:
  ins := ins0*portal2central_hormone_ratio*(glc_ext^n_ins/(glc_ext^n_ins + km_glc_ext_ins^n_ins));
  glucagon := glucagon0*portal2central_hormone_ratio*(ONE - glc_ext^n_glucagon/(glc_ext^n_glucagon + km_glc_ext_glucagon^n_glucagon)) + glucagonb*portal2central_hormone_ratio;
  gamma := num_05*(ONE + (-(ins^n_ins_gamma/(ins^n_ins_gamma + km_ins_gamma^n_ins_gamma)*(ONE - c16_ext/(c16_ext + km_c16_gamma)))) + glucagon^n_glucagon_gamma/(glucagon^n_glucagon_gamma + km_glucagon_gamma^n_glucagon_gamma));
  gamma_ACC1 := gamma;
  v_FAS_c16 := vmax_FAS_c16*(c14_coa_cyt/(c14_coa_cyt + km_FAS_c16_c14_coa_cyt))*(malcoa_cyt/(malcoa_cyt + km_FAS_c16_malcoa_cyt))*(nadph_cyt^n_FAS_c16_nadph_cyt/(nadph_cyt^n_FAS_c16_nadph_cyt + km_FAS_c16_nadph_cyt^n_FAS_c16_nadph_cyt));
  v_FAS_c14 := vmax_FAS_c14*(c12_coa_cyt/(c12_coa_cyt + km_FAS_c14_c12_coa_cyt))*(malcoa_cyt/(malcoa_cyt + km_FAS_c14_malcoa_cyt))*(nadph_cyt^n_FAS_c14_nadph_cyt/(nadph_cyt^n_FAS_c14_nadph_cyt + km_FAS_c14_nadph_cyt^n_FAS_c14_nadph_cyt));
  v_FAS_c12 := vmax_FAS_c12*(c10_coa_cyt/(c10_coa_cyt + km_FAS_c12_c10_coa_cyt))*(malcoa_cyt/(malcoa_cyt + km_FAS_c12_malcoa_cyt))*(nadph_cyt^n_FAS_c12_nadph_cyt/(nadph_cyt^n_FAS_c12_nadph_cyt + km_FAS_c12_nadph_cyt^n_FAS_c12_nadph_cyt));
  v_FAS_c10 := vmax_FAS_c10*(c8_coa_cyt/(c8_coa_cyt + km_FAS_c10_c8_coa_cyt))*(malcoa_cyt/(malcoa_cyt + km_FAS_c10_malcoa_cyt))*(nadph_cyt^n_FAS_c10_nadph_cyt/(nadph_cyt^n_FAS_c10_nadph_cyt + km_FAS_c10_nadph_cyt^n_FAS_c10_nadph_cyt));
  v_FAS_c8 := vmax_FAS_c8*(c6_coa_cyt/(c6_coa_cyt + km_FAS_c8_c6_coa_cyt))*(malcoa_cyt/(malcoa_cyt + km_FAS_c8_malcoa_cyt))*(nadph_cyt^n_FAS_c8_nadph_cyt/(nadph_cyt^n_FAS_c8_nadph_cyt + km_FAS_c8_nadph_cyt^n_FAS_c8_nadph_cyt));
  v_FAS_c6 := vmax_FAS_c6*(c4_coa_cyt/(c4_coa_cyt + km_FAS_c6_c4_coa_cyt))*(malcoa_cyt/(malcoa_cyt + km_FAS_c6_malcoa_cyt))*(nadph_cyt^n_FAS_c6_nadph_cyt/(nadph_cyt^n_FAS_c6_nadph_cyt + km_FAS_c6_nadph_cyt^n_FAS_c6_nadph_cyt));
  v_FAS_c4 := vmax_FAS_c4*(acoa_cyt/(acoa_cyt + km_FAS_c4_acoa_cyt))*(malcoa_cyt/(malcoa_cyt + km_FAS_c4_malcoa_cyt))*(nadph_cyt^n_FAS_c4_nadph_cyt/(nadph_cyt^n_FAS_c4_nadph_cyt + km_FAS_c4_nadph_cyt^n_FAS_c4_nadph_cyt));
  vmax_ACC1_native := num_25*v0_ACC1*(ONE + f_ACC1_native_cit_cyt*(cit_cyt/(cit_cyt + ka_ACC1_native_cit_cyt)))*(ONE - malcoa_cyt/(malcoa_cyt + ki_ACC1_native_malcoa_cyt));
  v_ACC1_native := vmax_ACC1_native*(atp_cyt/(atp_cyt + km_ACC1_native_atp_cyt))*(acoa_cyt/(acoa_cyt + km_ACC1_native_acoa_cyt))*(hco3_cyt/(hco3_cyt + km_ACC1_native_hco3_cyt));
  vmax_ACC1_phospho := v0_ACC1*(cit_cyt/(cit_cyt + ka_ACC1_phospho_cit_cyt))*(ONE - malcoa_cyt/(malcoa_cyt + ki_ACC1_phospho_malcoa_cyt))*(ONE - c16_coa_cyt/(c16_coa_cyt + km_ACC1_phospho_c16_coa_cyt));
  v_ACC1_phospho := vmax_ACC1_phospho*(atp_cyt/(atp_cyt + km_ACC1_phospho_atp_cyt))*(acoa_cyt/(acoa_cyt + km_ACC1_phospho_acoa_cyt))*(hco3_cyt/(hco3_cyt + km_ACC1_phospho_hco3_cyt));
  v_ACC1 := (ONE - gamma_ACC1)*v_ACC1_native + gamma_ACC1*v_ACC1_phospho;
  km_CIT_LYS_atp_cyt := k0_CIT_LYS_atp_cyt*(ONE + adp_cyt/ki_CIT_LYS_adp_cyt);
  v_CIT_LYS := vmax_CIT_LYS*((cit_cyt*coa_cyt*atp_cyt - acoa_cyt*adp_cyt*p_cyt*oaa_cyt/keq_CIT_LYS)/((cit_cyt + km_CIT_LYS_cit_cyt)*(coa_cyt + km_CIT_LYS_coa_cyt)*(atp_cyt + km_CIT_LYS_atp_cyt)));

  // Rate rules:
  Vmm' = dxVmm;

  // Reactions:
  CIT_LYS: cit_cyt + coa_cyt + atp_cyt -> acoa_cyt + adp_cyt + p_cyt + oaa_cyt; v_CIT_LYS;
  ACC1: atp_cyt + acoa_cyt -> adp_cyt + malcoa_cyt + p_cyt; v_ACC1;
  FAS_c4: malcoa_cyt + acoa_cyt + 2 nadph_cyt -> c4_coa_cyt + 2 nadp_cyt + coa_cyt; v_FAS_c4;
  FAS_c6: malcoa_cyt + c4_coa_cyt + 2 nadph_cyt -> c6_coa_cyt + 2 nadp_cyt + coa_cyt; v_FAS_c6;
  FAS_c8: malcoa_cyt + c6_coa_cyt + 2 nadph_cyt -> c8_coa_cyt + 2 nadp_cyt + coa_cyt; v_FAS_c8;
  FAS_c10: malcoa_cyt + c8_coa_cyt + 2 nadph_cyt -> c10_coa_cyt + 2 nadp_cyt + coa_cyt; v_FAS_c10;
  FAS_c12: malcoa_cyt + c10_coa_cyt + 2 nadph_cyt -> c12_coa_cyt + 2 nadp_cyt + coa_cyt; v_FAS_c12;
  FAS_c14: malcoa_cyt + c12_coa_cyt + 2 nadph_cyt -> c14_coa_cyt + 2 nadp_cyt + coa_cyt; v_FAS_c14;
  FAS_c16: malcoa_cyt + c14_coa_cyt + 2 nadph_cyt -> c16_coa_cyt + 2 nadp_cyt + coa_cyt; v_FAS_c16;

  // Unit definitions:
  unit mM = mole / metre^3;
  unit V = volt;
  unit K = kelvin;
  unit J_per_V_per_mol = joule / (volt * mole);
  unit J_per_K_per_mol = joule / (kelvin * mole);
  unit per_h = 1 / (3600 second);
  unit V_per_h = volt / (3600 second);
  unit mM_per_h = mole / (metre^3 * 3600 second);
  unit per_h_per_mMmM = metre^6 / (3600 second * mole^2);
  unit per_h_per_mM = metre^3 / (3600 second * mole);
  unit per_mM = metre^3 / mole;
  unit per_mMmM = metre^6 / mole^2;
  unit per_mMmMmM = metre^9 / mole^3;
  unit litre_per_mole_per_second = litre / (mole * second);
  unit metre_per_second = metre / second;
  unit squaremetre = metre^2;
  unit cubicmetre = metre^3;
  unit J_per_mol = joule / mole;
  unit mAs_per_h = 1e-3 ampere * second / (3600 second);
  unit farad_per_m2 = farad * metre^2;
end
